p := 0.75
π_1 := 0.7
π_2 := 0.7
Given
P_0000 == P_0000*p + P_0001*(1 - π_2)*p
P_0100 == P_0000*(1 - p) + P_0100*π_1*p + P_0001*(1 - π_2)*(1 - p) + P_0101*p*π_1*(1 - π_2) + P_1101*(1 - π_1)*(1 - π_2)
P_0001 == P_0001*p*π_2 + P_0100*(1 - π_1)*p + P_0101*(1 - π_1)*(1 - π_2)*p + P_0011*p*(1 - π_2)
P_0101 == P_0101*(π_1*π_2*p + (1 - π_1)*(1 - π_2)*(1 - p)) + P_0001*(1 - p)*π_2 + P_0011*(1 - p)*(1 - π_2) + P_0111*(1 - p)*(1 - π_1)*(1 - π_2) + P_1101*(1 - π_1)*(1 - π_2) + P_1100*(1 - π_1) + P_0100*(1 - p)*(1 - π_1)
P_0011 == P_0011*p*π_2 + P_0101*(1 - π_1)*π_2*p + P_0111*p*(1 - π_1)
P_0111 == P_0111*((1 - p)*(1 - π_1) + p*π_1*π_2) + P_0101*(1 - π_1)*π_2 + P_1111*(1 - π_1) + P_0011*(1 - p)*π_2
P_1111 == P_1111*π_1*π_2 + P_0111*(1 - p)*π_1*π_2
P_1101 == P_1111*π_1*(1 - π_2) + P_0111*(1 - p)*π_1*(1 - π_2) + P_0101*π_1*π_2*(1 - p) + P_1101*π_1*π_2
P_0000 + P_0100 + P_0001 + P_0101 + P_0011 + P_0111 + P_1101 + P_1100 + P_1111 == 1
[P_0000; P_0100; P_0001; P_0101; P_0011; P_0111; P_1101; P_1100; P_1111] := Find(P_0000, P_0100, P_0001, P_0101, P_0011, P_0111, P_1101, P_1100, P_1111) → [0.126459408147; 0.150755525096; 0.140510453497; 0.154046637294; 0.0996636633212; 0.102568420905; 0.0577043666378; 0.143654992628; 0.0246365324724]
P'_1100 == P_1100*π_1 + P_0100*π_1*(1 - p) + P_0101*(1 - p)*π_1*(1 - π_2) + P_1101*π_1*(1 - π_2)
A := (P_0001 + P_0101 + P_0011 + P_0111 + P_1111 + P_1101)*(1 - π_2) = 0.173739
L_оч := P_0011 + P_0111 + P_1111 = 0.226869
Q := 1 - (1 - π_1)*π_2*(P_0111 + P_1111) = 0.973287
